// SBML level 3 version 1

function KL_66175(S, Km, kcat, E, kcat_Km, A)
  S(times, kcat(E, times))/Km(S, plus);
end

function KL_66176(kcat, kcat_Km, A, E, Km, S)
  S(times, kcat(E, times))/Km(S, plus);
end

function KL_66182(kcat, E, S, Km, kcat_Km, A)
  S(times, kcat(E, times))/Km(S, plus);
end

function KL_66183(E, A, Km, kcat_Km, S, kcat)
  S(times, kcat(E, times))/Km(S, plus);
end

function KL_66179(Km, kcat_Km, kcat, S, E, A)
  S(times, kcat(E, times))/Km(S, plus);
end

function KL_66181(kcat, Km, kcat_Km, E, S, A)
  S(times, kcat(E, times))/Km(S, plus);
end

function KL_66184(Km, E, kcat, S, kcat_Km, A)
  S(times, kcat(E, times))/Km(S, plus);
end

function KL_66185(kcat, Km, S, kcat_Km, E, A)
  S(times, kcat(E, times))/Km(S, plus);
end

function KL_66177(S, kcat_Km, E, kcat, Km, A)
  S(times, kcat(E, times))/Km(S, plus);
end

function KL_66178(Km, kcat, A, S, kcat_Km, E)
  S(times, kcat(E, times))/Km(S, plus);
end

function KL_66180(Km, kcat_Km, S, kcat, E, A)
  S(times, kcat(E, times))/Km(S, plus);
end

function KL_66187(kcat, Km, kcat_Km, E, S, A)
  S(times, kcat(E, times))/Km(S, plus);
end

function KL_66188(E, kcat_Km, S, A, Km, kcat)
  S(times, kcat(E, times))/Km(S, plus);
end

function KL_66186(kcat, E, Km, S, kcat_Km, A)
  S(times, kcat(E, times))/Km(S, plus);
end

function KL_66189(kcat_Km, kcat, E, Km, S, A)
  S(times, kcat(E, times))/Km(S, plus);
end

function KL_5923(A, kcat, E, B, Km)
  A(times, E(kcat, times))/Km(A, plus);
end

function KL_5927(Ki, A, Km, E, kcat)
  E(kcat, times)/(1 + Km(A, divide) + A(Ki, divide));
end

function KL_5928(Km, B, kcat, A, E)
  A(times, E(kcat, times))/Km(A, plus);
end

function KL_5926(A, Km, E, kcat, B)
  A(times, E(kcat, times))/Km(A, plus);
end

function KL_5924(E, B, kcat, A, Km)
  A(times, E(kcat, times))/Km(A, plus);
end

function KL_5925(A, Km, kcat, B, E)
  A(times, E(kcat, times))/Km(A, plus);
end

model SABIOmdl19Aug2024620()
  // This model has been created with the help of the SABIO-RK Database (http://sabio.h-its.org/) (c) 2005-2024 HITS gGmbH http://www.h-its.org
  // SABIO-RK - database for biochemical reaction kinetics. Wittig U, Kania R, Golebiewski M, Rey M, Shi L, Jong L, Algaa E, Weidemann A, Sauer-Danzwith H, Mir S, Krebs O, Bittkowski M, Wetsch E, Rojas I, Mueller W. Nucleic Acids Res. 2012;40(Database issue)790-6

  // Compartments:
  compartment compart_chloroplast = 0;
  compartment compart_Cell = 0;

  // Species:
  species SPC_39_chloroplast in compart_chloroplast = 1; SPC_39_chloroplast is "H+";  // CHEBI:15378 CHEBI:5584 CHEBI:29234 CHEBI:29233
  species SPC_2286_chloroplast in compart_chloroplast = 1; SPC_2286_chloroplast is "Acrolein";  // CHEBI:15368 CHEBI:2434 CHEBI:22214 CHEBI:13720
  species SPC_1262_chloroplast in compart_chloroplast = 1; SPC_1262_chloroplast is "NADPH";  // CHEBI:16474 CHEBI:7425 CHEBI:57783 CHEBI:44286
  species SPC_1263_chloroplast in compart_chloroplast = 1; SPC_1263_chloroplast is "NADP+";  // CHEBI:44409 CHEBI:25523 CHEBI:18009 CHEBI:7424
  species SPC_2056_chloroplast in compart_chloroplast = 1; SPC_2056_chloroplast is "Propanal";  // CHEBI:17153 CHEBI:8468 CHEBI:45052 CHEBI:41359
  species ENZ_377915_chloroplast in compart_chloroplast = 1; ENZ_377915_chloroplast is "Enzyme wildtype";  // uniprot:E2S0A5
  species SPC_20832_chloroplast in compart_chloroplast = 1; SPC_20832_chloroplast is "Crotonaldehyde";  // CHEBI:41607 kegg.compound:C19377
  species SPC_2281_chloroplast in compart_chloroplast = 1; SPC_2281_chloroplast is "Butanal";  // CHEBI:15743 CHEBI:3233 CHEBI:22938 CHEBI:13923
  species ENZ_377921_chloroplast in compart_chloroplast = 1; ENZ_377921_chloroplast is "Enzyme wildtype";  // uniprot:E2S0A5
  species SPC_38_chloroplast in compart_chloroplast = 1; SPC_38_chloroplast is "NADH";  // CHEBI:16908 CHEBI:7423 CHEBI:57945 CHEBI:44216
  species SPC_37_chloroplast in compart_chloroplast = 1; SPC_37_chloroplast is "NAD+";  // CHEBI:44215 CHEBI:13389 CHEBI:15846 CHEBI:7422
  species ENZ_377957_chloroplast in compart_chloroplast = 1; ENZ_377957_chloroplast is "Enzyme wildtype";  // uniprot:E2S0A5
  species ENZ_377963_chloroplast in compart_chloroplast = 1; ENZ_377963_chloroplast is "Enzyme wildtype GST-tag";  // uniprot:Q9ZUC1
  species SPC_31505_chloroplast in compart_chloroplast = 1; SPC_31505_chloroplast is "3-Penten-2-one";  // CHEBI:89540
  species SPC_2343_chloroplast in compart_chloroplast = 1; SPC_2343_chloroplast is "2-Pentanone";  // CHEBI:16472 CHEBI:7978 CHEBI:25886 CHEBI:14748
  species ENZ_377939_chloroplast in compart_chloroplast = 1; ENZ_377939_chloroplast is "Enzyme wildtype";  // uniprot:E2S0A5
  species ENZ_377951_chloroplast in compart_chloroplast = 1; ENZ_377951_chloroplast is "Enzyme wildtype";  // uniprot:E2S0A5
  species ENZ_377969_chloroplast in compart_chloroplast = 1; ENZ_377969_chloroplast is "Enzyme wildtype GST-tag";  // uniprot:Q9ZUC1
  species ENZ_377975_chloroplast in compart_chloroplast = 1; ENZ_377975_chloroplast is "Enzyme wildtype GST-tag";  // uniprot:Q9ZUC1
  species SPC_30271_chloroplast in compart_chloroplast = 1; SPC_30271_chloroplast is "3-Buten-2-one";
  species SPC_2545_chloroplast in compart_chloroplast = 1; SPC_2545_chloroplast is "2-Butanone";  // CHEBI:28398 CHEBI:6858 CHEBI:25249 kegg.compound:C02845
  species ENZ_377927_chloroplast in compart_chloroplast = 1; ENZ_377927_chloroplast is "Enzyme wildtype";  // uniprot:E2S0A5
  species SPC_31504_chloroplast in compart_chloroplast = 1; SPC_31504_chloroplast is "1-Penten-3-one";  // CHEBI:89945
  species SPC_23238_chloroplast in compart_chloroplast = 1; SPC_23238_chloroplast is "3-Pentanone";  // CHEBI:67886 CHEBI:87755
  species ENZ_377933_chloroplast in compart_chloroplast = 1; ENZ_377933_chloroplast is "Enzyme wildtype";  // uniprot:E2S0A5
  species SPC_31507_chloroplast in compart_chloroplast = 1; SPC_31507_chloroplast is "4-Hexen-3-one";  // CHEBI:89801
  species SPC_31506_chloroplast in compart_chloroplast = 1; SPC_31506_chloroplast is "3-Hexanone";  // CHEBI:89891
  species ENZ_377945_chloroplast in compart_chloroplast = 1; ENZ_377945_chloroplast is "Enzyme wildtype";  // uniprot:E2S0A5
  species ENZ_377987_chloroplast in compart_chloroplast = 1; ENZ_377987_chloroplast is "Enzyme wildtype GST-tag";  // uniprot:Q9ZUC1
  species ENZ_377993_chloroplast in compart_chloroplast = 1; ENZ_377993_chloroplast is "Enzyme wildtype GST-tag";  // uniprot:Q9ZUC1
  species ENZ_377981_chloroplast in compart_chloroplast = 1; ENZ_377981_chloroplast is "Enzyme wildtype GST-tag";  // uniprot:Q9ZUC1
  species ENZ_377999_chloroplast in compart_chloroplast = 1; ENZ_377999_chloroplast is "Enzyme wildtype GST-tag";  // uniprot:Q9ZUC1
  species SPC_6180_Cell in compart_Cell = 1; SPC_6180_Cell is "Cyclohex-2-enone";  // CHEBI:15977 CHEBI:4007 CHEBI:23463 CHEBI:14047
  species SPC_38_Cell in compart_Cell = 1; SPC_38_Cell is "NADH";  // CHEBI:16908 CHEBI:7423 CHEBI:57945 CHEBI:44216
  species SPC_5081_Cell in compart_Cell = 1; SPC_5081_Cell is "Cyclohexanone";  // CHEBI:17854 CHEBI:41770 CHEBI:4014 CHEBI:23481
  species SPC_37_Cell in compart_Cell = 1; SPC_37_Cell is "NAD+";  // CHEBI:44215 CHEBI:13389 CHEBI:15846 CHEBI:7422
  species ENZ_30893_Cell in compart_Cell = 1; ENZ_30893_Cell is "Enzyme wildtype";  // uniprot:Q51990
  species ENZ_30913_Cell in compart_Cell = 1; ENZ_30913_Cell is "Enzyme mutant N189A";  // uniprot:Q51990
  species ENZ_30918_Cell in compart_Cell = 1; ENZ_30918_Cell is "Enzyme mutant N189A";  // uniprot:Q51990
  species ENZ_30908_Cell in compart_Cell = 1; ENZ_30908_Cell is "Enzyme wildtype";  // uniprot:Q51990
  species ENZ_30898_Cell in compart_Cell = 1; ENZ_30898_Cell is "Enzyme mutant C191A";  // uniprot:Q51990
  species ENZ_30903_Cell in compart_Cell = 1; ENZ_30903_Cell is "Enzyme mutant C191A";  // uniprot:Q51990

  // Reactions:
  REAC_0: SPC_39_chloroplast + SPC_2286_chloroplast + SPC_1262_chloroplast -> SPC_1263_chloroplast + SPC_2056_chloroplast; KL_66175(SPC_2286_chloroplast, REAC_0_Km_SPC_2286_chloroplast, REAC_0_kcat, ENZ_377915_chloroplast, REAC_0_kcat_Km_SPC_2286_chloroplast, SPC_1262_chloroplast);  // modifiers: ENZ_377915_chloroplast; sabiork.reaction:15377; isVersionOf ec-code:1.3.1.-; hasTaxon taxonomy:3659; occursIn BTO:0000713
    REAC_0_Km_SPC_2286_chloroplast = 0.0136 M; REAC_0_kcat = 63 swedgeone; REAC_0_kcat_Km_SPC_2286_chloroplast = 4630 Mwedgeoneswedgeone;
  REAC_1: SPC_39_chloroplast + SPC_20832_chloroplast + SPC_1262_chloroplast -> SPC_2281_chloroplast + SPC_1263_chloroplast; KL_66176(REAC_1_kcat, REAC_1_kcat_Km_SPC_20832_chloroplast, SPC_1262_chloroplast, ENZ_377921_chloroplast, REAC_1_Km_SPC_20832_chloroplast, SPC_20832_chloroplast);  // modifiers: ENZ_377921_chloroplast; sabiork.reaction:15378; isVersionOf ec-code:1.3.1.-; hasTaxon taxonomy:3659; occursIn BTO:0000713
    REAC_1_kcat = 42 swedgeone; REAC_1_kcat_Km_SPC_20832_chloroplast = 1410 Mwedgeoneswedgeone; REAC_1_Km_SPC_20832_chloroplast = 0.0298 M;
  REAC_2: SPC_2286_chloroplast + SPC_38_chloroplast + SPC_39_chloroplast -> SPC_2056_chloroplast + SPC_37_chloroplast; KL_66182(REAC_2_kcat, ENZ_377957_chloroplast, SPC_38_chloroplast, REAC_2_Km_SPC_38_chloroplast, REAC_2_kcat_Km_SPC_38_chloroplast, SPC_2286_chloroplast);  // modifiers: ENZ_377957_chloroplast; sabiork.reaction:15383; isVersionOf ec-code:1.3.1.-; hasTaxon taxonomy:3659; occursIn BTO:0000713
    REAC_2_kcat = 75 swedgeone; REAC_2_Km_SPC_38_chloroplast = 0.00464 M; REAC_2_kcat_Km_SPC_38_chloroplast = 16200 Mwedgeoneswedgeone;
  REAC_3: SPC_38_chloroplast + SPC_2286_chloroplast + SPC_39_chloroplast -> SPC_37_chloroplast + SPC_2056_chloroplast; KL_66183(ENZ_377963_chloroplast, SPC_2286_chloroplast, REAC_3_Km_SPC_38_chloroplast, REAC_3_kcat_Km_SPC_38_chloroplast, SPC_38_chloroplast, REAC_3_kcat);  // modifiers: ENZ_377963_chloroplast; sabiork.reaction:15383; isVersionOf ec-code:1.3.1.-; hasTaxon taxonomy:3702
    REAC_3_Km_SPC_38_chloroplast = 5.3e-5 M; REAC_3_kcat_Km_SPC_38_chloroplast = 434000 Mwedgeoneswedgeone; REAC_3_kcat = 23 swedgeone;
  REAC_4: SPC_1262_chloroplast + SPC_39_chloroplast + SPC_31505_chloroplast -> SPC_1263_chloroplast + SPC_2343_chloroplast; KL_66179(Km_SPC_31505_chloroplast, kcat_Km_SPC_31505_chloroplast, REAC_4_kcat, SPC_31505_chloroplast, ENZ_377939_chloroplast, SPC_1262_chloroplast);  // modifiers: ENZ_377939_chloroplast; sabiork.reaction:15381; isVersionOf ec-code:1.3.1.-; hasTaxon taxonomy:3659; occursIn BTO:0000713
    Km_SPC_31505_chloroplast = 0.00063 M; kcat_Km_SPC_31505_chloroplast = 34900 Mwedgeoneswedgeone; REAC_4_kcat = 22 swedgeone;
  REAC_5: SPC_1262_chloroplast + SPC_39_chloroplast + SPC_2286_chloroplast -> SPC_1263_chloroplast + SPC_2056_chloroplast; KL_66181(REAC_5_kcat, REAC_5_Km_SPC_1262_chloroplast, REAC_5_kcat_Km_SPC_1262_chloroplast, ENZ_377951_chloroplast, SPC_1262_chloroplast, SPC_2286_chloroplast);  // modifiers: ENZ_377951_chloroplast; sabiork.reaction:15377; isVersionOf ec-code:1.3.1.-; hasTaxon taxonomy:3659; occursIn BTO:0000713
    REAC_5_kcat = 75 swedgeone; REAC_5_Km_SPC_1262_chloroplast = 0.000185 M; REAC_5_kcat_Km_SPC_1262_chloroplast = 406000 Mwedgeoneswedgeone;
  REAC_6: SPC_1262_chloroplast + SPC_39_chloroplast + SPC_2286_chloroplast -> SPC_1263_chloroplast + SPC_2056_chloroplast; KL_66184(REAC_6_Km_SPC_1262_chloroplast, ENZ_377969_chloroplast, REAC_6_kcat, SPC_1262_chloroplast, REAC_6_kcat_Km_SPC_1262_chloroplast, SPC_2286_chloroplast);  // modifiers: ENZ_377969_chloroplast; sabiork.reaction:15377; isVersionOf ec-code:1.3.1.-; hasTaxon taxonomy:3702
    REAC_6_Km_SPC_1262_chloroplast = 1e-5 M; REAC_6_kcat = 23 swedgeone; REAC_6_kcat_Km_SPC_1262_chloroplast = 2300000 Mwedgeoneswedgeone;
  REAC_7: SPC_2286_chloroplast + SPC_1262_chloroplast + SPC_39_chloroplast -> SPC_1263_chloroplast + SPC_2056_chloroplast; KL_66185(REAC_7_kcat, REAC_7_Km_SPC_2286_chloroplast, SPC_2286_chloroplast, REAC_7_kcat_Km_SPC_2286_chloroplast, ENZ_377975_chloroplast, SPC_1262_chloroplast);  // modifiers: ENZ_377975_chloroplast; sabiork.reaction:15377; isVersionOf ec-code:1.3.1.-; hasTaxon taxonomy:3702
    REAC_7_kcat = 22 swedgeone; REAC_7_Km_SPC_2286_chloroplast = 0.0035 M; REAC_7_kcat_Km_SPC_2286_chloroplast = 6280 Mwedgeoneswedgeone;
  REAC_8: SPC_30271_chloroplast + SPC_39_chloroplast + SPC_1262_chloroplast -> SPC_2545_chloroplast + SPC_1263_chloroplast; KL_66177(SPC_30271_chloroplast, REAC_8_kcat_Km_SPC_30271_chloroplast, ENZ_377927_chloroplast, REAC_8_kcat, REAC_8_Km_SPC_30271_chloroplast, SPC_1262_chloroplast);  // modifiers: ENZ_377927_chloroplast; sabiork.reaction:15379; isVersionOf ec-code:1.3.1.-; hasTaxon taxonomy:3659; occursIn BTO:0000713
    REAC_8_kcat_Km_SPC_30271_chloroplast = 25700 Mwedgeoneswedgeone; REAC_8_kcat = 74 swedgeone; REAC_8_Km_SPC_30271_chloroplast = 0.00288 M;
  REAC_9: SPC_31504_chloroplast + SPC_39_chloroplast + SPC_1262_chloroplast -> SPC_1263_chloroplast + SPC_23238_chloroplast; KL_66178(REAC_9_Km_SPC_31504_chloroplast, REAC_9_kcat, SPC_1262_chloroplast, SPC_31504_chloroplast, REAC_9_kcat_Km_SPC_31504_chloroplast, ENZ_377933_chloroplast);  // modifiers: ENZ_377933_chloroplast; sabiork.reaction:15380; isVersionOf ec-code:1.3.1.-; hasTaxon taxonomy:3659; occursIn BTO:0000713
    REAC_9_Km_SPC_31504_chloroplast = 0.00058 M; REAC_9_kcat = 61 swedgeone; REAC_9_kcat_Km_SPC_31504_chloroplast = 105000 Mwedgeoneswedgeone;
  REAC_10: SPC_39_chloroplast + SPC_31507_chloroplast + SPC_1262_chloroplast -> SPC_1263_chloroplast + SPC_31506_chloroplast; KL_66180(REAC_10_Km_SPC_31507_chloroplast, REAC_10_kcat_Km_SPC_31507_chloroplast, SPC_31507_chloroplast, REAC_10_kcat, ENZ_377945_chloroplast, SPC_1262_chloroplast);  // modifiers: ENZ_377945_chloroplast; sabiork.reaction:15382; isVersionOf ec-code:1.3.1.-; hasTaxon taxonomy:3659; occursIn BTO:0000713
    REAC_10_Km_SPC_31507_chloroplast = 2.3e-5 M; REAC_10_kcat_Km_SPC_31507_chloroplast = 2960000 Mwedgeoneswedgeone; REAC_10_kcat = 68 swedgeone;
  REAC_11: SPC_39_chloroplast + SPC_30271_chloroplast + SPC_1262_chloroplast -> SPC_2545_chloroplast + SPC_1263_chloroplast; KL_66187(REAC_11_kcat, REAC_11_Km_SPC_30271_chloroplast, REAC_11_kcat_Km_SPC_30271_chloroplast, ENZ_377987_chloroplast, SPC_30271_chloroplast, SPC_1262_chloroplast);  // modifiers: ENZ_377987_chloroplast; sabiork.reaction:15379; isVersionOf ec-code:1.3.1.-; hasTaxon taxonomy:3702
    REAC_11_kcat = 3.5 swedgeone; REAC_11_Km_SPC_30271_chloroplast = 0.00013 M; REAC_11_kcat_Km_SPC_30271_chloroplast = 26900 Mwedgeoneswedgeone;
  REAC_12: SPC_1262_chloroplast + SPC_39_chloroplast + SPC_31504_chloroplast -> SPC_1263_chloroplast + SPC_23238_chloroplast; KL_66188(ENZ_377993_chloroplast, REAC_12_kcat_Km_SPC_31504_chloroplast, SPC_31504_chloroplast, SPC_1262_chloroplast, REAC_12_Km_SPC_31504_chloroplast, REAC_12_kcat);  // modifiers: ENZ_377993_chloroplast; sabiork.reaction:15380; isVersionOf ec-code:1.3.1.-; hasTaxon taxonomy:3702
    REAC_12_kcat_Km_SPC_31504_chloroplast = 13800 Mwedgeoneswedgeone; REAC_12_Km_SPC_31504_chloroplast = 0.00029 M; REAC_12_kcat = 4 swedgeone;
  REAC_13: SPC_20832_chloroplast + SPC_1262_chloroplast + SPC_39_chloroplast -> SPC_2281_chloroplast + SPC_1263_chloroplast; KL_66186(REAC_13_kcat, ENZ_377981_chloroplast, REAC_13_Km_SPC_20832_chloroplast, SPC_20832_chloroplast, REAC_13_kcat_Km_SPC_20832_chloroplast, SPC_1262_chloroplast);  // modifiers: ENZ_377981_chloroplast; sabiork.reaction:15378; isVersionOf ec-code:1.3.1.-; hasTaxon taxonomy:3702
    REAC_13_kcat = 1.3 swedgeone; REAC_13_Km_SPC_20832_chloroplast = 0.0018 M; REAC_13_kcat_Km_SPC_20832_chloroplast = 720 Mwedgeoneswedgeone;
  REAC_14: SPC_39_chloroplast + SPC_31507_chloroplast + SPC_1262_chloroplast -> SPC_1263_chloroplast + SPC_31506_chloroplast; KL_66189(REAC_14_kcat_Km_SPC_31507_chloroplast, REAC_14_kcat, ENZ_377999_chloroplast, REAC_14_Km_SPC_31507_chloroplast, SPC_31507_chloroplast, SPC_1262_chloroplast);  // modifiers: ENZ_377999_chloroplast; sabiork.reaction:15382; isVersionOf ec-code:1.3.1.-; hasTaxon taxonomy:3702
    REAC_14_kcat_Km_SPC_31507_chloroplast = 27500 Mwedgeoneswedgeone; REAC_14_kcat = 3.3 swedgeone; REAC_14_Km_SPC_31507_chloroplast = 0.00012 M;
  REAC_15: SPC_6180_Cell + SPC_38_Cell -> SPC_5081_Cell + SPC_37_Cell; KL_5923(SPC_6180_Cell, REAC_15_kcat, ENZ_30893_Cell, SPC_38_Cell, REAC_15_Km_SPC_6180_Cell);  // modifiers: ENZ_30893_Cell; sabiork.reaction:7323; isVersionOf ec-code:1.3.1.-; hasTaxon taxonomy:303
    REAC_15_kcat = 0.8 swedgeone; REAC_15_Km_SPC_6180_Cell = 0.0042 M;
  REAC_16: SPC_38_Cell + SPC_6180_Cell -> SPC_37_Cell + SPC_5081_Cell; KL_5927(Ki_SPC_6180_Cell, SPC_6180_Cell, REAC_16_Km_SPC_6180_Cell, ENZ_30913_Cell, REAC_16_kcat);  // modifiers: ENZ_30913_Cell; sabiork.reaction:7323; isVersionOf ec-code:1.3.1.-; hasTaxon taxonomy:303
    Ki_SPC_6180_Cell = 0.0138 M; REAC_16_Km_SPC_6180_Cell = 0.0022 M; REAC_16_kcat = 0.089 swedgeone;
  REAC_17: SPC_38_Cell + SPC_6180_Cell -> SPC_37_Cell + SPC_5081_Cell; KL_5928(REAC_17_Km_SPC_38_Cell, SPC_6180_Cell, REAC_17_kcat, SPC_38_Cell, ENZ_30918_Cell);  // modifiers: ENZ_30918_Cell; sabiork.reaction:7323; isVersionOf ec-code:1.3.1.-; hasTaxon taxonomy:303
    REAC_17_Km_SPC_38_Cell = 0.0001193 M; REAC_17_kcat = 0.083 swedgeone;
  REAC_18: SPC_6180_Cell + SPC_38_Cell -> SPC_37_Cell + SPC_5081_Cell; KL_5926(SPC_38_Cell, REAC_18_Km_SPC_38_Cell, ENZ_30908_Cell, REAC_18_kcat, SPC_6180_Cell);  // modifiers: ENZ_30908_Cell; sabiork.reaction:7323; isVersionOf ec-code:1.3.1.-; hasTaxon taxonomy:303
    REAC_18_Km_SPC_38_Cell = 0.0089 M; REAC_18_kcat = 0.88 swedgeone;
  REAC_19: SPC_6180_Cell + SPC_38_Cell -> SPC_37_Cell + SPC_5081_Cell; KL_5924(ENZ_30898_Cell, SPC_38_Cell, REAC_19_kcat, SPC_6180_Cell, REAC_19_Km_SPC_6180_Cell);  // modifiers: ENZ_30898_Cell; sabiork.reaction:7323; isVersionOf ec-code:1.3.1.-; hasTaxon taxonomy:303
    REAC_19_kcat = 0.32 swedgeone; REAC_19_Km_SPC_6180_Cell = 0.0085 M;
  REAC_20: SPC_6180_Cell + SPC_38_Cell -> SPC_37_Cell + SPC_5081_Cell; KL_5925(SPC_38_Cell, REAC_20_Km_SPC_6180_Cell, REAC_20_kcat, SPC_6180_Cell, ENZ_30903_Cell);  // modifiers: ENZ_30903_Cell; sabiork.reaction:7323; isVersionOf ec-code:1.3.1.-; hasTaxon taxonomy:303
    REAC_20_Km_SPC_6180_Cell = 0.0085 M; REAC_20_kcat = 0.34 swedgeone;

  // Unit definitions:
  unit M = 10 mole / (10 litre);
  unit swedgeone = 1 / (10 second); swedgeone is "s^(-1)";
  unit Mwedgeoneswedgeone = 10 litre / (10 mole * 10 second); Mwedgeoneswedgeone is "M^(-1)*s^(-1)";
end
