// SBML level 3 version 1

function KL_5622(E, A, KmA, Vmax_KmA, Vmax)
  Vmax*A/(KmA + A);
end

function KL_5627(KmA, E, Vmax_KmA, A, Vmax)
  Vmax*A/(KmA + A);
end

function KL_5625(Vmax_KmA, KmA, E, Vmax, A)
  Vmax*A/(KmA + A);
end

function KL_5624(Vmax, KmA, E, A, Vmax_KmA)
  Vmax*A/(KmA + A);
end

function KL_5620(E, A, KmA, Vmax_KmA, Vmax)
  Vmax*A/(KmA + A);
end

function KL_5619(A, KmA, Vmax, Vmax_KmA, E)
  Vmax*A/(KmA + A);
end

function KL_5623(KmA, A, Vmax_KmA, E, Vmax)
  Vmax*A/(KmA + A);
end

function KL_5621(KmA, Vmax_KmA, Vmax, A, E)
  Vmax*A/(KmA + A);
end

function KL_5626(Vmax, E, Vmax_KmA, KmA, A)
  Vmax*A/(KmA + A);
end

function KL_5618(E, Vmax_KmA, A, KmA, Vmax)
  Vmax*A/(KmA + A);
end

model SABIOmdl20Aug2024219()
  // This model has been created with the help of the SABIO-RK Database (http://sabio.h-its.org/) (c) 2005-2024 HITS gGmbH http://www.h-its.org
  // To cite SABIO-RK Database, please use "http://www.ncbi.nlm.nih.gov/pubmed/22102587"
  // SABIO-RK - database for biochemical reaction kinetics. Wittig U, Kania R, Golebiewski M, Rey M, Shi L, Jong L, Algaa E, Weidemann A, Sauer-Danzwith H, Mir S, Krebs O, Bittkowski M, Wetsch E, Rojas I, Mueller W. Nucleic Acids Res. 2012;40(Database issue)790-6

  // Compartments:
  compartment compart_microsome;

  // Species:
  species SPC_40_microsome in compart_microsome = 1; SPC_40_microsome is "H2O";  // CHEBI:15377 CHEBI:5585 CHEBI:44819 CHEBI:44701
  species SPC_21342_microsome in compart_microsome = 1; SPC_21342_microsome is "(1-Chloroethenyl)oxirane";
  species SPC_21366_microsome in compart_microsome = 1; SPC_21366_microsome is "3-Chloro-3-butene-1,2-diol";
  species ENZ_29266_microsome in compart_microsome = 1; ENZ_29266_microsome is "microsomal epoxide hydrolase(Enzyme) wildtype";  // uniprot:P07099
  species ENZ_29286_microsome in compart_microsome = 1; ENZ_29286_microsome is "microsomal epoxide hydrolase(Enzyme) wildtype";  // uniprot:P07099
  species ENZ_29278_microsome in compart_microsome = 1; ENZ_29278_microsome is "microsomal epoxide hydrolase(Enzyme) wildtype";  // uniprot:P07687
  species ENZ_29274_microsome in compart_microsome = 1; ENZ_29274_microsome is "microsomal epoxide hydrolase(Enzyme) wildtype";  // uniprot:P07687
  species ENZ_29258_microsome in compart_microsome = 1; ENZ_29258_microsome is "microsomal epoxide hydrolase(Enzyme) wildtype";  // uniprot:P07687
  species ENZ_29254_microsome in compart_microsome = 1; ENZ_29254_microsome is "microsomal epoxide hydrolase(Enzyme) wildtype";  // uniprot:P07687
  species ENZ_29270_microsome in compart_microsome = 1; ENZ_29270_microsome is "microsomal epoxide hydrolase(Enzyme) wildtype";  // uniprot:Q9D379
  species ENZ_29262_microsome in compart_microsome = 1; ENZ_29262_microsome is "microsomal epoxide hydrolase(Enzyme) wildtype";
  species ENZ_29282_microsome in compart_microsome = 1; ENZ_29282_microsome is "microsomal epoxide hydrolase(Enzyme) wildtype";
  species ENZ_29250_microsome in compart_microsome = 1; ENZ_29250_microsome is "microsomal epoxide hydrolase(Enzyme) wildtype";  // uniprot:Q9D379

  // Reactions:
  REAC_0: SPC_40_microsome + SPC_21342_microsome -> SPC_21366_microsome; KL_5622(ENZ_29266_microsome, SPC_21342_microsome, REAC_0_KmA_SPC_21342_microsome, REAC_0_Vmax_KmA_SPC_21342_microsome, REAC_0_Vmax);  // modifiers: ENZ_29266_microsome; isVersionOf ec-code:3.3.2.9; hasTaxon taxonomy:9606; sabiork.reaction:7243; occursIn BTO:0000759
    REAC_0_KmA_SPC_21342_microsome = 9.97e-5 M; REAC_0_Vmax_KmA_SPC_21342_microsome = 0.01019444 lgwedgeoneswedgeone; REAC_0_Vmax = 1.016667e-6 molswedgeonegwedgeone;
  REAC_1: SPC_40_microsome + SPC_21342_microsome -> SPC_21366_microsome; KL_5627(REAC_1_KmA_SPC_21342_microsome, ENZ_29286_microsome, REAC_1_Vmax_KmA_SPC_21342_microsome, SPC_21342_microsome, REAC_1_Vmax);  // modifiers: ENZ_29286_microsome; isVersionOf ec-code:3.3.2.9; hasTaxon taxonomy:9606; sabiork.reaction:7243; occursIn BTO:0000763
    REAC_1_KmA_SPC_21342_microsome = 7.22e-5 M; REAC_1_Vmax_KmA_SPC_21342_microsome = 0.002222222 lgwedgeoneswedgeone; REAC_1_Vmax = 1.611111e-7 molswedgeonegwedgeone;
  REAC_2: SPC_40_microsome + SPC_21342_microsome -> SPC_21366_microsome; KL_5625(REAC_2_Vmax_KmA_SPC_21342_microsome, REAC_2_KmA_SPC_21342_microsome, ENZ_29278_microsome, REAC_2_Vmax, SPC_21342_microsome);  // modifiers: ENZ_29278_microsome; isVersionOf ec-code:3.3.2.9; hasTaxon taxonomy:10116; sabiork.reaction:7243; occursIn BTO:0000763
    REAC_2_Vmax_KmA_SPC_21342_microsome = 0.0004722222 lgwedgeoneswedgeone; REAC_2_KmA_SPC_21342_microsome = 9.16e-5 M; REAC_2_Vmax = 4.444444e-8 molswedgeonegwedgeone;
  REAC_3: SPC_21342_microsome + SPC_40_microsome -> SPC_21366_microsome; KL_5624(REAC_3_Vmax, REAC_3_KmA_SPC_21342_microsome, ENZ_29274_microsome, SPC_21342_microsome, REAC_3_Vmax_KmA_SPC_21342_microsome);  // modifiers: ENZ_29274_microsome; isVersionOf ec-code:3.3.2.9; hasTaxon taxonomy:10116; sabiork.reaction:7243; occursIn BTO:0000763
    REAC_3_Vmax = 3.333333e-8 molswedgeonegwedgeone; REAC_3_KmA_SPC_21342_microsome = 9.09e-5 M; REAC_3_Vmax_KmA_SPC_21342_microsome = 0.0003611111 lgwedgeoneswedgeone;
  REAC_4: SPC_40_microsome + SPC_21342_microsome -> SPC_21366_microsome; KL_5620(ENZ_29258_microsome, SPC_21342_microsome, REAC_4_KmA_SPC_21342_microsome, REAC_4_Vmax_KmA_SPC_21342_microsome, REAC_4_Vmax);  // modifiers: ENZ_29258_microsome; isVersionOf ec-code:3.3.2.9; hasTaxon taxonomy:10116; sabiork.reaction:7243; occursIn BTO:0000759
    REAC_4_KmA_SPC_21342_microsome = 5.3e-5 M; REAC_4_Vmax_KmA_SPC_21342_microsome = 0.003361111 lgwedgeoneswedgeone; REAC_4_Vmax = 1.777778e-7 molswedgeonegwedgeone;
  REAC_5: SPC_21342_microsome + SPC_40_microsome -> SPC_21366_microsome; KL_5619(SPC_21342_microsome, REAC_5_KmA_SPC_21342_microsome, REAC_5_Vmax, REAC_5_Vmax_KmA_SPC_21342_microsome, ENZ_29254_microsome);  // modifiers: ENZ_29254_microsome; isVersionOf ec-code:3.3.2.9; hasTaxon taxonomy:10116; sabiork.reaction:7243; occursIn BTO:0000759
    REAC_5_KmA_SPC_21342_microsome = 4.15e-5 M; REAC_5_Vmax = 1.666667e-7 molswedgeonegwedgeone; REAC_5_Vmax_KmA_SPC_21342_microsome = 0.004027778 lgwedgeoneswedgeone;
  REAC_6: SPC_40_microsome + SPC_21342_microsome -> SPC_21366_microsome; KL_5623(REAC_6_KmA_SPC_21342_microsome, SPC_21342_microsome, REAC_6_Vmax_KmA_SPC_21342_microsome, ENZ_29270_microsome, REAC_6_Vmax);  // modifiers: ENZ_29270_microsome; isVersionOf ec-code:3.3.2.9; hasTaxon taxonomy:10090; sabiork.reaction:7243; occursIn BTO:0000763
    REAC_6_KmA_SPC_21342_microsome = 5.15e-5 M; REAC_6_Vmax_KmA_SPC_21342_microsome = 0.0005833333 lgwedgeoneswedgeone; REAC_6_Vmax = 3.055556e-8 molswedgeonegwedgeone;
  REAC_7: SPC_40_microsome + SPC_21342_microsome -> SPC_21366_microsome; KL_5621(REAC_7_KmA_SPC_21342_microsome, REAC_7_Vmax_KmA_SPC_21342_microsome, REAC_7_Vmax, SPC_21342_microsome, ENZ_29262_microsome);  // modifiers: ENZ_29262_microsome; isVersionOf ec-code:3.3.2.9; hasTaxon taxonomy:10036; sabiork.reaction:7243; occursIn BTO:0000759
    REAC_7_KmA_SPC_21342_microsome = 7.38e-5 M; REAC_7_Vmax_KmA_SPC_21342_microsome = 0.009361111 lgwedgeoneswedgeone; REAC_7_Vmax = 6.916667e-7 molswedgeonegwedgeone;
  REAC_8: SPC_21342_microsome + SPC_40_microsome -> SPC_21366_microsome; KL_5626(REAC_8_Vmax, ENZ_29282_microsome, REAC_8_Vmax_KmA_SPC_21342_microsome, REAC_8_KmA_SPC_21342_microsome, SPC_21342_microsome);  // modifiers: ENZ_29282_microsome; isVersionOf ec-code:3.3.2.9; hasTaxon taxonomy:10036; sabiork.reaction:7243; occursIn BTO:0000763
    REAC_8_Vmax = 3.722222e-7 molswedgeonegwedgeone; REAC_8_Vmax_KmA_SPC_21342_microsome = 0.001972222 lgwedgeoneswedgeone; REAC_8_KmA_SPC_21342_microsome = 0.0001876 M;
  REAC_9: SPC_21342_microsome + SPC_40_microsome -> SPC_21366_microsome; KL_5618(ENZ_29250_microsome, REAC_9_Vmax_KmA_SPC_21342_microsome, SPC_21342_microsome, REAC_9_KmA_SPC_21342_microsome, REAC_9_Vmax);  // modifiers: ENZ_29250_microsome; isVersionOf ec-code:3.3.2.9; hasTaxon taxonomy:10090; sabiork.reaction:7243; occursIn BTO:0000759
    REAC_9_Vmax_KmA_SPC_21342_microsome = 0.001861111 lgwedgeoneswedgeone; REAC_9_KmA_SPC_21342_microsome = 2.09e-5 M; REAC_9_Vmax = 3.888889e-8 molswedgeonegwedgeone;

  // Unit definitions:
  unit M = 10 mole / (10 litre);
  unit lgwedgeoneswedgeone = 10 litre / (10 gram * 10 second); lgwedgeoneswedgeone is "l*g^(-1)*s^(-1)";
  unit molswedgeonegwedgeone = 10 mole / (10 gram * 10 second); molswedgeonegwedgeone is "mol*s^(-1)*g^(-1)";
end
